# OpenSim document version 30000
MarkerSet:
  Marker neck: torso (-0.07 0.44 0)
  Marker back_down: torso (-0.1 0.22 0)
  Marker r_humerus2: humerus_r (-0.04 -0.15 0)
  Marker r_humerus3: humerus_r (0 -0.2 0.02)
  Marker r_humerus1: humerus_r (0.03 -0.13 0.02)
  Marker rl_elbow: humerus_r (0.00783071 -0.278708 0.0394699)
  Marker rm_elbow: humerus_r (0.00175 -0.28389 -0.07029)
  Marker r_radius1: ulna_r (-0.0382061 -0.0814802 0.0257056)
  Marker r_radius3: radius_r (-0.0243074 -0.119601 0.0232259) fixed=true
  Marker r_radius2: radius_r (-0.0310978 -0.118671 -0.0235274)
  Marker rm_wrist: radius_r (-0.01531 -0.23272 -0.01839)
  Marker rl_wrist: radius_r (-0.00316 -0.22312 0.04988)
  Marker r_hand: hand_r (-0.02193 -0.05913 0.00021)
  Marker l_humerus2: humerus_l (-0.04 -0.15 0)
  Marker l_humerus3: humerus_l (0 -0.2 -0.02)
  Marker l_humerus1: humerus_l (0.03 -0.13 -0.02)
  Marker ll_elbow: humerus_l (0.0068387 -0.283858 -0.0445931)
  Marker lm_elbow: humerus_l (0.00175 -0.28389 0.07029)
  Marker l_radius1: ulna_l (-0.0367736 -0.0716805 -0.025522)
  Marker l_radius3: radius_l (-0.0312783 -0.103546 -0.0190022)
  Marker l_radius2: radius_l (-0.0344256 -0.105435 0.0196884)
  Marker lm_wrist: radius_l (-0.01531 -0.23272 0.01839)
  Marker ll_wrist: radius_l (-0.00316 -0.22312 -0.04988)
  Marker l_hand: hand_l (-0.02231 -0.05623 0.00042)
  Marker r_shoulder: torso (-0.0248718 0.426445 0.168585)
  Marker l_shoulder: torso (-0.0220089 0.440789 -0.171971)
  Marker head_up: torso (0.058708 0.653451 0.000245315)
  Marker r_asis: pelvis (0.0228989 0.0358624 0.130116)
  Marker l_asis: pelvis (0.0291329 0.0276591 -0.131894)
  Marker sacrum: pelvis (-0.172091 0.0400029 0.00619843)
  Marker r_thigh2: femur_r (0.0235797 -0.223394 0.10012)
  Marker r_thigh3: femur_r (0.026038 -0.344483 0.093109)
  Marker rl_knee: femur_r (-0.000586415 -0.426232 0.0605411)
  Marker rm_knee: femur_r (-0.00243031 -0.442908 -0.0607482)
  Marker r_shank1: tibia_r (-0.0345186 -0.161982 0.0540986)
  Marker r_shank4: tibia_r (-0.0368573 -0.225281 0.0497339)
  Marker rl_ankle: tibia_r (-0.00490543 -0.430843 0.0549207)
  Marker rm_ankle: tibia_r (0.00286259 -0.416327 -0.034325)
  Marker r_heel: calcn_r (-0.0204819 0.0172884 -0.00503735)
  Marker r_metatarsal5: calcn_r (0.208562 0.0010208 0.0387383)
  Marker r_metatarsal1: calcn_r (0.209814 0.00169807 -0.0323684)
  Marker l_thigh2: femur_l (0.0484552 -0.216227 -0.0931139)
  Marker l_thigh3: femur_l (0.0430234 -0.325657 -0.0700176)
  Marker ll_knee: femur_l (-0.000753513 -0.446142 -0.062296)
  Marker lm_knee: femur_l (0.000472512 -0.445432 0.0539506)
  Marker l_shank1: tibia_l (-0.0254917 -0.155313 -0.0529183)
  Marker l_shank4: tibia_l (-0.0215676 -0.226448 -0.0517303)
  Marker ll_ankle: tibia_l (0.00383431 -0.428451 -0.0544338)
  Marker lm_ankle: tibia_l (0.0078901 -0.405161 0.0369253)
  Marker l_heel: calcn_l (-0.0226192 0.0268643 0.00786188)
  Marker l_metatarsal5: calcn_l (0.19383 -0.00218698 -0.0324064)
  Marker l_metatarsal1: calcn_l (0.211787 0.00788619 0.0273165)
  Marker l_shank2: tibia_l (0.016563 -0.159717 -0.0343176)
  Marker l_shank3: tibia_l (0.0176182 -0.23033 -0.0268304)
  Marker r_shank2: tibia_r (0.00999946 -0.16787 0.0373091)
  Marker r_shank3: tibia_r (0.00512774 -0.233633 0.0381438)
  Marker r_thigh1: femur_r (-0.0279942 -0.222784 0.0906951)
  Marker r_thigh4: femur_r (-0.0244184 -0.343288 0.0820306)
  Marker l_thigh1: femur_l (0.000778572 -0.210229 -0.133794)
  Marker l_thigh4: femur_l (-0.00301527 -0.315787 -0.127864)
  Marker r_psis: pelvis (-0.186171 0.00857327 0.0643711)
  Marker l_psis: pelvis (-0.173475 0.00340253 -0.0608261)
  Marker l_illiac: pelvis (-0.0654368 0.0904434 -0.123396)
  Marker r_illiac: pelvis (-0.0661793 0.0967422 0.123297)
  Marker l_troch: pelvis (-0.0637848 -0.0374014 -0.165479)
  Marker r_troch: pelvis (-0.0512498 -0.0632372 0.145927)
  Marker back_right: torso (-0.0973985 0.271455 0.10499)
  Marker back_left: torso (-0.0926661 0.280393 -0.0968854)
