# OpenSim document version 30000
CMCTool subject01_Run_50002_cycle1_probed_0_muscles_changed_0:
  model_file: subject01_RRA_adjusted_Run_50002_cycle1_v191_with_corrected_mass_probed_0_muscles_changed_0.osim
  replace_force_set: false
  force_set_files: gait2392_CMC_Actuators.xml
  results_directory: CMC_Results_v240_Run_50002_cycle1_probed_0_muscles_changed_0
  output_precision: 10
  initial_time: 0
  final_time: 99.99
  solve_for_equilibrium_for_auxiliary_states: true
  maximum_number_of_integrator_steps: 20000
  maximum_integrator_step_size: 1
  minimum_integrator_step_size: 1e-8
  integrator_error_tolerance: 1e-5
  external_loads_file: run5_external_forces.xml
  desired_kinematics_file: RRA_Results_v191_Run_50002_cycle1\subject01_Run_50002_cycle1_Kinematics_q.sto
  task_set_file: gait2392_CMC_Tasks.xml
  constraints_file: subject01_Run_50002_cycle1_ControlConstraints.xml
  lowpass_cutoff_frequency: 8
  cmc_time_window: 0.01
  use_fast_optimization_target: false
  optimizer_algorithm: ipopt
  numerical_derivative_step_size: 0.0001
  optimization_convergence_tolerance: 0.001
  optimizer_max_iterations: 10000
  optimizer_print_level: 0
  use_verbose_printing: false
  AnalysisSet Analyses:
    ProbeReporter MetabolicsReporter
    MuscleAnalysis: start_time=0 end_time=99.99 step_interval=1 in_degrees=true muscle_list=all
        moment_arm_coordinate_list=all compute_moments=false
