# OpenSim document version 30000
AnalyzeTool jump_jo100_2_model:
  model_file: jump_jo100_2_gait_with_arms_scaled.osim
  replace_force_set: false
  results_directory: .
  output_precision: 8
  initial_time: 0
  final_time: 2.2125
  solve_for_equilibrium_for_auxiliary_states: false
  maximum_number_of_integrator_steps: 20000
  maximum_integrator_step_size: 1
  minimum_integrator_step_size: 1e-8
  integrator_error_tolerance: 1e-5
  external_loads_file: jump_jo100_2_external_forces.xml
  coordinates_file: jump_jo100_2.mot
  lowpass_cutoff_frequency_for_coordinates: -1
  AnalysisSet Analyses:
    BodyKinematics: start_time=0 end_time=2.2125 step_interval=1 in_degrees=true bodies=all
        express_results_in_body_local_frame=false
    JointReaction: start_time=0 end_time=2.2125 step_interval=1 in_degrees=true joint_names=ALL apply_on_bodies=child
        express_in_frame=ground
