# OpenSim document version 30000
InverseKinematicsTool:
  results_directory: ./
  model_file: jump_jo500_2_gait_with_arms_scaled.osim
  constraint_weight: Inf
  accuracy: 1e-5
  marker_file: jump_jo500_2.trc
  time_range: 0 2.1925
  report_errors: true
  output_motion_file: jump_jo500_2.mot
  report_marker_locations: false
  IKTaskSet:
    IKMarkerTask neck: apply=true weight=1
    IKMarkerTask back_down: apply=true weight=1
    IKMarkerTask r_humerus2: apply=true weight=1
    IKMarkerTask r_humerus3: apply=true weight=1
    IKMarkerTask r_humerus1: apply=true weight=1
    IKMarkerTask rl_elbow: apply=true weight=1
    IKMarkerTask rm_elbow: apply=true weight=1
    IKMarkerTask r_radius1: apply=true weight=1
    IKMarkerTask r_radius3: apply=true weight=1
    IKMarkerTask r_radius2: apply=true weight=1
    IKMarkerTask rm_wrist: apply=true weight=1
    IKMarkerTask rl_wrist: apply=true weight=1
    IKMarkerTask r_hand: apply=true weight=1
    IKMarkerTask l_humerus2: apply=true weight=1
    IKMarkerTask l_humerus3: apply=true weight=1
    IKMarkerTask l_humerus1: apply=true weight=1
    IKMarkerTask ll_elbow: apply=true weight=1
    IKMarkerTask lm_elbow: apply=true weight=1
    IKMarkerTask l_radius1: apply=true weight=1
    IKMarkerTask l_radius3: apply=true weight=1
    IKMarkerTask l_radius2: apply=true weight=1
    IKMarkerTask lm_wrist: apply=true weight=1
    IKMarkerTask ll_wrist: apply=true weight=1
    IKMarkerTask l_hand: apply=true weight=1
    IKMarkerTask r_shoulder: apply=true weight=1
    IKMarkerTask l_shoulder: apply=true weight=1
    IKMarkerTask head_up: apply=true weight=1
    IKMarkerTask r_asis: apply=true weight=1
    IKMarkerTask l_asis: apply=true weight=1
    IKMarkerTask sacrum: apply=true weight=1
    IKMarkerTask r_thigh2: apply=true weight=1
    IKMarkerTask r_thigh3: apply=true weight=1
    IKMarkerTask rl_knee: apply=true weight=1
    IKMarkerTask rm_knee: apply=true weight=1
    IKMarkerTask r_shank1: apply=true weight=1
    IKMarkerTask r_shank4: apply=true weight=1
    IKMarkerTask rl_ankle: apply=true weight=1
    IKMarkerTask rm_ankle: apply=true weight=1
    IKMarkerTask r_heel: apply=true weight=1
    IKMarkerTask r_metatarsal5: apply=true weight=1
    IKMarkerTask r_metatarsal1: apply=true weight=1
    IKMarkerTask l_thigh2: apply=true weight=1
    IKMarkerTask l_thigh3: apply=true weight=1
    IKMarkerTask ll_knee: apply=true weight=1
    IKMarkerTask lm_knee: apply=true weight=1
    IKMarkerTask l_shank1: apply=true weight=1
    IKMarkerTask l_shank4: apply=true weight=1
    IKMarkerTask ll_ankle: apply=true weight=1
    IKMarkerTask lm_ankle: apply=true weight=1
    IKMarkerTask l_heel: apply=true weight=1
    IKMarkerTask l_metatarsal5: apply=true weight=1
    IKMarkerTask l_metatarsal1: apply=true weight=1
